<?xml version="1.0"?>
<!--
  a10: E-flite A-10 twin 64mm EDF, 1.15 m - EDF, zero propwash.
  GENERATED by airframe_gen.py (GPL-3.0-or-later, see repo LICENSE) -
  edit the parameter dict there, not this file. Same idealized-thruster
  structure as aerobat3d; coefficients are handbook estimates derived
  from researched specs (span 1.149 m, S 0.219 m2, AUW ~2.32 kg,
  static thrust ~2.45 kg => T/W ~1.06).
-->
<fdm_config name="a10" version="2.0" release="ALPHA">
  <fileheader>
    <author>Daniel Haensse</author>
    <description>E-flite A-10 twin 64mm EDF, 1.15 m - EDF, zero propwash</description>
  </fileheader>
  <metrics>
    <wingarea unit="M2"> 0.219 </wingarea>
    <wingspan unit="M"> 1.149 </wingspan>
    <chord unit="M"> 0.191 </chord>
    <htailarea unit="M2"> 0.039 </htailarea>
    <htailarm unit="M"> 0.31 </htailarm>
    <vtailarea unit="M2"> 0.022 </vtailarea>
    <vtailarm unit="M"> 0.31 </vtailarm>
    <location name="AERORP" unit="M"> <x> 0.0 </x> <y> 0 </y> <z> 0 </z> </location>
    <location name="EYEPOINT" unit="M"> <x> 0 </x> <y> 0 </y> <z> 0.1 </z> </location>
    <location name="VRP" unit="M"> <x> 0 </x> <y> 0 </y> <z> 0 </z> </location>
  </metrics>
  <mass_balance>
    <ixx unit="KG*M2"> 0.0459 </ixx>
    <iyy unit="KG*M2"> 0.0919 </iyy>
    <izz unit="KG*M2"> 0.1149 </izz>
    <emptywt unit="KG"> 1.92 </emptywt>
    <location name="CG" unit="M"> <x> 0 </x> <y> 0 </y> <z> 0 </z> </location>
    <pointmass name="battery">
      <weight unit="KG"> 0.4 </weight>
      <location unit="M"> <x> 0.05 </x> <y> 0 </y> <z> 0 </z> </location>
    </pointmass>
  </mass_balance>
  <ground_reactions>
    <contact type="BOGEY" name="MAIN_L">
      <location unit="M"> <x> 0.05 </x> <y> -0.18 </y> <z> -0.15 </z> </location>
      <static_friction> 0.7 </static_friction> <dynamic_friction> 0.5 </dynamic_friction>
      <spring_coeff unit="N/M"> 800 </spring_coeff> <damping_coeff unit="N/M/SEC"> 60 </damping_coeff>
    </contact>
    <contact type="BOGEY" name="MAIN_R">
      <location unit="M"> <x> 0.05 </x> <y> 0.18 </y> <z> -0.15 </z> </location>
      <static_friction> 0.7 </static_friction> <dynamic_friction> 0.5 </dynamic_friction>
      <spring_coeff unit="N/M"> 800 </spring_coeff> <damping_coeff unit="N/M/SEC"> 60 </damping_coeff>
    </contact>
    <contact type="BOGEY" name="TAIL">
      <location unit="M"> <x> -0.50 </x> <y> 0 </y> <z> -0.05 </z> </location>
      <static_friction> 0.7 </static_friction> <dynamic_friction> 0.5 </dynamic_friction>
      <spring_coeff unit="N/M"> 400 </spring_coeff> <damping_coeff unit="N/M/SEC"> 30 </damping_coeff>
    </contact>
  </ground_reactions>
  <external_reactions>
    <force name="motor" frame="BODY" unit="LBS">
      <function>
        <product>
          <property> fcs/throttle-cmd-norm </property>
          <value> 5.4 </value>
        </product>
      </function>
      <location unit="M"> <x> -0.05 </x> <y> 0 </y> <z> 0.02 </z> </location>
      <direction> <x> 1 </x> <y> 0 </y> <z> 0 </z> </direction>
    </force>
    <force name="prop-torque-r" frame="BODY" unit="LBS">
      <function>
        <product>
          <property> fcs/throttle-cmd-norm </property>
          <value> 0.0 </value>
        </product>
      </function>
      <location unit="M"> <x> -0.05 </x> <y> 0.4 </y> <z> 0.02 </z> </location>
      <direction> <x> 0 </x> <y> 0 </y> <z> -1 </z> </direction>
    </force>
    <force name="prop-torque-l" frame="BODY" unit="LBS">
      <function>
        <product>
          <property> fcs/throttle-cmd-norm </property>
          <value> 0.0 </value>
        </product>
      </function>
      <location unit="M"> <x> -0.05 </x> <y> -0.4 </y> <z> 0.02 </z> </location>
      <direction> <x> 0 </x> <y> 0 </y> <z> 1 </z> </direction>
    </force>
  </external_reactions>
  <flight_control name="FCS">
    <property value="0.0"> fcs/throttle-cmd-norm </property>
    <property value="0.0"> fcs/flap-cmd-norm </property>
    <channel name="Roll">
      <aerosurface_scale name="aileron">
        <input>fcs/aileron-cmd-norm</input>
        <range> <min>-1</min> <max>1</max> </range>
        <output>fcs/aileron-pos-norm</output>
      </aerosurface_scale>
    </channel>
    <channel name="Pitch">
      <aerosurface_scale name="elevator">
        <input>fcs/elevator-cmd-norm</input>
        <range> <min>-1</min> <max>1</max> </range>
        <output>fcs/elevator-pos-norm</output>
      </aerosurface_scale>
    </channel>
    <channel name="Yaw">
      <aerosurface_scale name="rudder">
        <input>fcs/rudder-cmd-norm</input>
        <range> <min>-1</min> <max>1</max> </range>
        <output>fcs/rudder-pos-norm</output>
      </aerosurface_scale>
    </channel>
  </flight_control>
  <aerodynamics>
    <axis name="LIFT">
      <function name="aero/force/Lift_alpha">
        <product>
          <property>aero/qbar-psf</property> <property>metrics/Sw-sqft</property>
          <table>
            <independentVar lookup="row">aero/alpha-rad</independentVar>
            <tableData>
              -3.142   0.00
              -1.571   0.00
              -0.524  -0.56
              -0.349  -0.75
              -0.175  -0.41
               0.000  0.15
               0.122  0.65
               0.244  1.15
               0.436  0.92
               0.524  0.75
               1.571   0.00
               3.142   0.00
            </tableData>
          </table>
        </product>
      </function>
      <function name="aero/force/Lift_elevator">
        <product>
          <property>aero/qbar-psf</property> <property>metrics/Sw-sqft</property>
          <property>fcs/elevator-pos-norm</property> <value> 0.12 </value>
        </product>
      </function>
      <function name="aero/force/Lift_flap">
        <product>
          <property>aero/qbar-psf</property> <property>metrics/Sw-sqft</property>
          <property>fcs/flap-cmd-norm</property> <value> 0.4 </value>
        </product>
      </function>
    </axis>
    <axis name="DRAG">
      <function name="aero/force/Drag_basic">
        <product>
          <property>aero/qbar-psf</property> <property>metrics/Sw-sqft</property>
          <value> 0.04 </value>
        </product>
      </function>
      <function name="aero/force/Drag_induced">
        <product>
          <property>aero/qbar-psf</property> <property>metrics/Sw-sqft</property>
          <property>aero/cl-squared</property> <value> 0.07 </value>
        </product>
      </function>
      <function name="aero/force/Drag_flap">
        <product>
          <property>aero/qbar-psf</property> <property>metrics/Sw-sqft</property>
          <property>fcs/flap-cmd-norm</property> <value> 0.056 </value>
        </product>
      </function>
      <function name="aero/force/Drag_alpha_poststall">
        <product>
          <property>aero/qbar-psf</property> <property>metrics/Sw-sqft</property>
          <table>
            <independentVar lookup="row">aero/alpha-rad</independentVar>
            <tableData>
              -3.142   0.00
              -1.571   1.30
              -1.047   1.00
              -0.524   0.30
              -0.262   0.00
               0.262   0.00
               0.524   0.30
               1.047   1.00
               1.571   1.30
               3.142   0.00
            </tableData>
          </table>
        </product>
      </function>
    </axis>
    <axis name="SIDE">
      <function name="aero/force/Side_beta">
        <product>
          <property>aero/qbar-psf</property> <property>metrics/Sw-sqft</property>
          <property>aero/beta-rad</property> <value> -0.40 </value>
        </product>
      </function>
    </axis>
    <axis name="ROLL">
      <function name="aero/moment/Roll_damp">
        <product>
          <property>aero/qbar-psf</property> <property>metrics/Sw-sqft</property>
          <property>metrics/bw-ft</property> <property>aero/bi2vel</property>
          <property>velocities/p-aero-rad_sec</property> <value> -0.40 </value>
        </product>
      </function>
      <function name="aero/moment/Roll_aileron">
        <product>
          <property>aero/qbar-psf</property> <property>metrics/Sw-sqft</property>
          <property>metrics/bw-ft</property> <property>fcs/aileron-pos-norm</property>
          <value> 0.16 </value>
        </product>
      </function>
      <function name="aero/moment/Roll_dihedral">
        <product>
          <property>aero/qbar-psf</property> <property>metrics/Sw-sqft</property>
          <property>metrics/bw-ft</property> <property>aero/beta-rad</property>
          <value> -0.02 </value>
        </product>
      </function>
    </axis>
    <axis name="PITCH">
      <function name="aero/moment/Pitch_zero">
        <product>
          <property>aero/qbar-psf</property> <property>metrics/Sw-sqft</property>
          <property>metrics/cbarw-ft</property>
          <value> 0.01 </value>
        </product>
      </function>
      <function name="aero/moment/Pitch_alpha">
        <product>
          <property>aero/qbar-psf</property> <property>metrics/Sw-sqft</property>
          <property>metrics/cbarw-ft</property> <property>aero/alpha-rad</property>
          <value> -0.5 </value>
        </product>
      </function>
      <function name="aero/moment/Pitch_damp">
        <product>
          <property>aero/qbar-psf</property> <property>metrics/Sw-sqft</property>
          <property>metrics/cbarw-ft</property> <property>aero/ci2vel</property>
          <property>velocities/q-aero-rad_sec</property> <value> -9.0 </value>
        </product>
      </function>
      <function name="aero/moment/Pitch_elevator">
        <product>
          <property>aero/qbar-psf</property> <property>metrics/Sw-sqft</property>
          <property>metrics/cbarw-ft</property> <property>fcs/elevator-pos-norm</property>
          <value> -0.6 </value>
        </product>
      </function>
      <function name="aero/moment/Pitch_elevator_propwash">
        <product>
          <property>fcs/throttle-cmd-norm</property>
          <property>fcs/elevator-pos-norm</property>
          <value> 0.0 </value>
        </product>
      </function>
      <function name="aero/moment/Pitch_flap">
        <product>
          <property>aero/qbar-psf</property> <property>metrics/Sw-sqft</property>
          <property>metrics/cbarw-ft</property>
          <property>fcs/flap-cmd-norm</property> <value> -0.080 </value>
        </product>
      </function>
    </axis>
    <axis name="YAW">
      <function name="aero/moment/Yaw_beta">
        <product>
          <property>aero/qbar-psf</property> <property>metrics/Sw-sqft</property>
          <property>metrics/bw-ft</property> <property>aero/beta-rad</property>
          <value> 0.07 </value>
        </product>
      </function>
      <function name="aero/moment/Yaw_damp">
        <product>
          <property>aero/qbar-psf</property> <property>metrics/Sw-sqft</property>
          <property>metrics/bw-ft</property> <property>aero/bi2vel</property>
          <property>velocities/r-aero-rad_sec</property> <value> -0.15 </value>
        </product>
      </function>
      <function name="aero/moment/Yaw_rudder">
        <product>
          <property>aero/qbar-psf</property> <property>metrics/Sw-sqft</property>
          <property>metrics/bw-ft</property> <property>fcs/rudder-pos-norm</property>
          <value> 0.1 </value>
        </product>
      </function>
      <function name="aero/moment/Yaw_rudder_propwash">
        <product>
          <property>fcs/throttle-cmd-norm</property>
          <property>fcs/rudder-pos-norm</property>
          <value> 0.0 </value>
        </product>
      </function>
    </axis>
  </aerodynamics>
</fdm_config>
