<?xml version="1.0"?>
<!--
  kingfisher: FMS Kingfisher 1400mm class STOL bush trainer for the
  flap/harrier bench work. Written from scratch for this project
  (GPL-3.0-or-later, see repo LICENSE), same idealized-thruster structure
  as aerobat3d. Cambered flat-bottom trainer airfoil, PLAIN flaps: moderate
  lift gain (dCL ~0.70), moderate nose-down moment (dCm -0.12) - the tame
  sibling of the turbotimber's slotted system, and the model with the
  least estimation uncertainty (plain-flap handbook data is solid).
  Coefficients are handbook estimates, good for behavior, not for exact
  stall speeds.
  Specs: span 1400 mm, S 0.291 m2, AUW ~1.4 kg, 11x7 (T/W ~0.75).
-->
<fdm_config name="kingfisher" version="2.0" release="ALPHA">
  <fileheader>
    <author>Daniel Haensse</author>
    <description>FMS Kingfisher 1400mm class STOL trainer, flaperon mix, 3S (T/W ~0.86)</description>
  </fileheader>

  <metrics>
    <wingarea unit="M2"> 0.291 </wingarea>
    <wingspan unit="M"> 1.400 </wingspan>
    <chord unit="M"> 0.208 </chord>
    <htailarea unit="M2"> 0.055 </htailarea>
    <htailarm unit="M"> 0.55 </htailarm>
    <vtailarea unit="M2"> 0.038 </vtailarea>
    <vtailarm unit="M"> 0.55 </vtailarm>
    <location name="AERORP" unit="M"> <x> 0.0 </x> <y> 0 </y> <z> 0 </z> </location>
    <location name="EYEPOINT" unit="M"> <x> 0 </x> <y> 0 </y> <z> 0.1 </z> </location>
    <location name="VRP" unit="M"> <x> 0 </x> <y> 0 </y> <z> 0 </z> </location>
  </metrics>

  <mass_balance>
    <ixx unit="KG*M2"> 0.070 </ixx>
    <iyy unit="KG*M2"> 0.080 </iyy>
    <izz unit="KG*M2"> 0.130 </izz>
    <emptywt unit="KG"> 1.10 </emptywt>
    <location name="CG" unit="M"> <x> 0 </x> <y> 0 </y> <z> 0 </z> </location>
    <pointmass name="battery">
      <weight unit="KG"> 0.30 </weight>
      <location unit="M"> <x> 0.05 </x> <y> 0 </y> <z> 0 </z> </location>
    </pointmass>
  </mass_balance>

  <ground_reactions>
    <contact type="BOGEY" name="MAIN_L">
      <location unit="M"> <x> 0.05 </x> <y> -0.16 </y> <z> -0.20 </z> </location>
      <static_friction> 0.8 </static_friction> <dynamic_friction> 0.5 </dynamic_friction>
      <spring_coeff unit="N/M"> 800 </spring_coeff> <damping_coeff unit="N/M/SEC"> 60 </damping_coeff>
    </contact>
    <contact type="BOGEY" name="MAIN_R">
      <location unit="M"> <x> 0.05 </x> <y> 0.16 </y> <z> -0.20 </z> </location>
      <static_friction> 0.8 </static_friction> <dynamic_friction> 0.5 </dynamic_friction>
      <spring_coeff unit="N/M"> 800 </spring_coeff> <damping_coeff unit="N/M/SEC"> 60 </damping_coeff>
    </contact>
    <contact type="BOGEY" name="TAIL">
      <location unit="M"> <x> -0.62 </x> <y> 0 </y> <z> -0.05 </z> </location>
      <static_friction> 0.8 </static_friction> <dynamic_friction> 0.5 </dynamic_friction>
      <spring_coeff unit="N/M"> 400 </spring_coeff> <damping_coeff unit="N/M/SEC"> 30 </damping_coeff>
    </contact>
  </ground_reactions>

  <!-- Idealized RC thruster (see aerobat3d): 2.65 LBS ~ 11.8 N static.
       Stock 3S: the 3536-850Kv turns the 11x7 at ~8000 rpm ~ 1.2 kg
       static thrust on 1.4 kg AUW => T/W ~0.86 - "knapp kein Hover":
       enough to hang ON THE CUSHION over the water, not enough to hover
       in free air, where it settles with the throttle pegged. The height
       table is IN-GROUND-EFFECT thrust augmentation: below roughly a prop
       diameter the reflected wash buys up to ~20% - which is exactly why
       the hang works a metre over the water (self-stabilizing: settle and
       the cushion stiffens) but not in free air. -->
  <external_reactions>
    <force name="motor" frame="BODY" unit="LBS">
      <function>
        <product>
          <property> fcs/throttle-cmd-norm </property>
          <value> 2.65 </value>
          <table>
            <independentVar lookup="row">position/h-agl-ft</independentVar>
            <tableData>
               0.0   1.30
               1.5   1.24
               3.0   1.18
               6.0   1.06
              10.0   1.00
            </tableData>
          </table>
        </product>
      </function>
      <location unit="M"> <x> 0.35 </x> <y> 0 </y> <z> 0 </z> </location>
      <direction> <x> 1 </x> <y> 0 </y> <z> 0 </z> </direction>
    </force>
    <force name="prop-torque-r" frame="BODY" unit="LBS">
      <function>
        <product>
          <property> fcs/throttle-cmd-norm </property>
          <value> 0.05 </value>
        </product>
      </function>
      <location unit="M"> <x> 0.35 </x> <y> 0.5 </y> <z> 0 </z> </location>
      <direction> <x> 0 </x> <y> 0 </y> <z> -1 </z> </direction>
    </force>
    <force name="prop-torque-l" frame="BODY" unit="LBS">
      <function>
        <product>
          <property> fcs/throttle-cmd-norm </property>
          <value> 0.05 </value>
        </product>
      </function>
      <location unit="M"> <x> 0.35 </x> <y> -0.5 </y> <z> 0 </z> </location>
      <direction> <x> 0 </x> <y> 0 </y> <z> 1 </z> </direction>
    </force>
    <force name="blown-flap" frame="BODY" unit="LBS">
      <!-- BLOWN flap: the prop stream gives the flapped wing dynamic
           pressure even at zero airspeed. The force acts perpendicular to
           the chord = body UP - which is why it helps the deep harrier
           (nose 40-60 deg) but NOT a vertical hover, where it points
           sideways. Plain flaperon, partly washed: ~20% of the weight. -->
      <function>
        <product>
          <property> fcs/throttle-cmd-norm </property>
          <property> fcs/flap-pos-norm </property>
          <value> 0.7 </value>
        </product>
      </function>
      <location unit="M"> <x> 0.0 </x> <y> 0 </y> <z> 0 </z> </location>
      <direction> <x> 0 </x> <y> 0 </y> <z> -1 </z> </direction>
    </force>
  </external_reactions>

  <flight_control name="FCS">
    <property value="0.0"> fcs/throttle-cmd-norm </property>
    <channel name="Roll">
      <aerosurface_scale name="aileron">
        <input>fcs/aileron-cmd-norm</input>
        <range> <min>-1</min> <max>1</max> </range>
        <output>fcs/aileron-pos-norm</output>
      </aerosurface_scale>
    </channel>
    <channel name="Pitch">
      <aerosurface_scale name="elevator">
        <input>fcs/elevator-cmd-norm</input>
        <range> <min>-1</min> <max>1</max> </range>
        <output>fcs/elevator-pos-norm</output>
      </aerosurface_scale>
    </channel>
    <channel name="Yaw">
      <aerosurface_scale name="rudder">
        <input>fcs/rudder-cmd-norm</input>
        <range> <min>-1</min> <max>1</max> </range>
        <output>fcs/rudder-pos-norm</output>
      </aerosurface_scale>
    </channel>
    <channel name="Flaps">
      <aerosurface_scale name="flaps">
        <input>fcs/flap-cmd-norm</input>
        <range> <min>0</min> <max>1</max> </range>
        <output>fcs/flap-pos-norm</output>
      </aerosurface_scale>
    </channel>
  </flight_control>

  <aerodynamics>
    <axis name="LIFT">
      <function name="aero/force/Lift_alpha">
        <description>Flat-bottom trainer airfoil: CL0 0.40, slope ~4.3/rad,
          CLmax 1.25 at 13 deg, gentle break to 0.80 at 30 deg. Poor
          inverted (CLmin -0.70).</description>
        <product>
          <property>aero/qbar-psf</property> <property>metrics/Sw-sqft</property>
          <table>
            <independentVar lookup="row">aero/alpha-rad</independentVar>
            <tableData>
              -3.142   0.00
              -1.571   0.00
              -0.524  -0.50
              -0.349  -0.70
              -0.175  -0.40
               0.000   0.40
               0.130   0.95
               0.227   1.25
               0.349   0.95
               0.524   0.75
               1.571   0.00
               3.142   0.00
            </tableData>
          </table>
        </product>
      </function>
      <function name="aero/force/Lift_flap">
        <description>PLAIN flaps PLUS drooped ailerons (flaperon mix, the
          usual slow-flight setup): full-span camber, dCL ~1.0 at full
          deflection, tapered off past the stall.</description>
        <product>
          <property>aero/qbar-psf</property> <property>metrics/Sw-sqft</property>
          <property>fcs/flap-pos-norm</property>
          <value> 1.00 </value>
          <table>
            <independentVar lookup="row">aero/alpha-rad</independentVar>
            <tableData>
              -3.142   0.00
              -0.524   0.30
              -0.262   1.00
               0.262   1.00
               0.524   0.30
               1.571   0.00
               3.142   0.00
            </tableData>
          </table>
        </product>
      </function>
      <function name="aero/force/Lift_elevator">
        <product>
          <property>aero/qbar-psf</property> <property>metrics/Sw-sqft</property>
          <property>fcs/elevator-pos-norm</property> <value> 0.14 </value>
        </product>
      </function>
    </axis>
    <axis name="DRAG">
      <function name="aero/force/Drag_basic">
        <product>
          <property>aero/qbar-psf</property> <property>metrics/Sw-sqft</property>
          <value> 0.055 </value>
        </product>
      </function>
      <function name="aero/force/Drag_induced">
        <product>
          <property>aero/qbar-psf</property> <property>metrics/Sw-sqft</property>
          <property>aero/cl-squared</property> <value> 0.065 </value>
        </product>
      </function>
      <function name="aero/force/Drag_flap">
        <description>Plain flap drag at full deflection</description>
        <product>
          <property>aero/qbar-psf</property> <property>metrics/Sw-sqft</property>
          <property>fcs/flap-pos-norm</property> <value> 0.11 </value>
        </product>
      </function>
      <function name="aero/force/Drag_alpha_poststall">
        <product>
          <property>aero/qbar-psf</property> <property>metrics/Sw-sqft</property>
          <table>
            <independentVar lookup="row">aero/alpha-rad</independentVar>
            <tableData>
              -3.142   0.00
              -1.571   1.30
              -1.047   1.00
              -0.524   0.30
              -0.262   0.00
               0.262   0.00
               0.524   0.30
               1.047   1.00
               1.571   1.30
               3.142   0.00
            </tableData>
          </table>
        </product>
      </function>
    </axis>
    <axis name="SIDE">
      <function name="aero/force/Side_beta">
        <product>
          <property>aero/qbar-psf</property> <property>metrics/Sw-sqft</property>
          <property>aero/beta-rad</property> <value> -0.45 </value>
        </product>
      </function>
    </axis>
    <axis name="ROLL">
      <function name="aero/moment/Roll_damp">
        <product>
          <property>aero/qbar-psf</property> <property>metrics/Sw-sqft</property>
          <property>metrics/bw-ft</property> <property>aero/bi2vel</property>
          <property>velocities/p-aero-rad_sec</property> <value> -0.42 </value>
        </product>
      </function>
      <function name="aero/moment/Roll_aileron">
        <product>
          <property>aero/qbar-psf</property> <property>metrics/Sw-sqft</property>
          <property>metrics/bw-ft</property> <property>fcs/aileron-pos-norm</property>
          <value> 0.11 </value>
        </product>
      </function>
      <function name="aero/moment/Roll_aileron_propwash">
        <product>
          <property>fcs/throttle-cmd-norm</property>
          <property>fcs/aileron-pos-norm</property>
          <value> 2.5 </value>
        </product>
      </function>
      <function name="aero/moment/Roll_dihedral">
        <description>High wing + dihedral self-leveling (see turbotimber)</description>
        <product>
          <property>aero/qbar-psf</property> <property>metrics/Sw-sqft</property>
          <property>metrics/bw-ft</property> <property>aero/beta-rad</property>
          <value> -0.09 </value>
        </product>
      </function>
    </axis>
    <axis name="PITCH">
      <function name="aero/moment/Pitch_zero">
        <description>Cm0: camber + tail downwash trim offset</description>
        <product>
          <property>aero/qbar-psf</property> <property>metrics/Sw-sqft</property>
          <property>metrics/cbarw-ft</property>
          <value> 0.035 </value>
        </product>
      </function>
      <function name="aero/moment/Pitch_alpha">
        <product>
          <property>aero/qbar-psf</property> <property>metrics/Sw-sqft</property>
          <property>metrics/cbarw-ft</property> <property>aero/alpha-rad</property>
          <value> -0.60 </value>
        </product>
      </function>
      <function name="aero/moment/Pitch_flap">
        <description>Plain flap nose-down moment - noticeably tamer than
          the slotted turbotimber</description>
        <product>
          <property>aero/qbar-psf</property> <property>metrics/Sw-sqft</property>
          <property>metrics/cbarw-ft</property> <property>fcs/flap-pos-norm</property>
          <value> -0.12 </value>
        </product>
      </function>
      <function name="aero/moment/Pitch_damp">
        <product>
          <property>aero/qbar-psf</property> <property>metrics/Sw-sqft</property>
          <property>metrics/cbarw-ft</property> <property>aero/ci2vel</property>
          <property>velocities/q-aero-rad_sec</property> <value> -11.0 </value>
        </product>
      </function>
      <function name="aero/moment/Pitch_elevator">
        <product>
          <property>aero/qbar-psf</property> <property>metrics/Sw-sqft</property>
          <property>metrics/cbarw-ft</property> <property>fcs/elevator-pos-norm</property>
          <value> -0.40 </value>
        </product>
      </function>
      <function name="aero/moment/Pitch_elevator_propwash">
        <product>
          <property>fcs/throttle-cmd-norm</property>
          <property>fcs/elevator-pos-norm</property>
          <value> -4.0 </value>
        </product>
      </function>
    </axis>
    <axis name="YAW">
      <function name="aero/moment/Yaw_beta">
        <product>
          <property>aero/qbar-psf</property> <property>metrics/Sw-sqft</property>
          <property>metrics/bw-ft</property> <property>aero/beta-rad</property>
          <value> 0.07 </value>
        </product>
      </function>
      <function name="aero/moment/Yaw_damp">
        <product>
          <property>aero/qbar-psf</property> <property>metrics/Sw-sqft</property>
          <property>metrics/bw-ft</property> <property>aero/bi2vel</property>
          <property>velocities/r-aero-rad_sec</property> <value> -0.18 </value>
        </product>
      </function>
      <function name="aero/moment/Yaw_rudder">
        <product>
          <property>aero/qbar-psf</property> <property>metrics/Sw-sqft</property>
          <property>metrics/bw-ft</property> <property>fcs/rudder-pos-norm</property>
          <value> 0.11 </value>
        </product>
      </function>
      <function name="aero/moment/Yaw_rudder_propwash">
        <product>
          <property>fcs/throttle-cmd-norm</property>
          <property>fcs/rudder-pos-norm</property>
          <value> 5.0 </value>
        </product>
      </function>
    </axis>
  </aerodynamics>
</fdm_config>
